OpenVSP model (file version 4), 6 components.
Geometry view with OpenVSP parameter names; values to 6 digits, angles in degrees, lengths in the model's unit.
Overall bounding box: X_Min=0 X_Len=34.6342 Y_Min=-21.2548 Y_Len=42.5096 Z_Min=-2.04793 Z_Len=6.51872

Wing "Wing"
  location (X Y Z) 19.4165 0 -1.68698, rotation 0 0 0
  symmetric about XZ
  bounding box size 6.01392 42.5096 2.26562
  totals: TotalSpan=42.672 TotalProjectedSpan=42.5096 TotalChord=3.458 TotalArea=147.56
  root: chord 6.01392, twist 0, NACA 4-series Camber=0 CamberLoc=0.2 ThickChord=0.12
  sections:
    n  Span    Root_Chord  Tip_Chord  Area   Sweep   Sweep_Location  Dihedral  Twist  Twist_Location  tip airfoil
    1  21.336  6.01392     0.902088   73.78  13.237  0               5         0      0.25            NACA 4-series Camber=0 CamberLoc=0.2 ThickChord=0.1

Fuselage "Fuselage"
  location (X Y Z) 0 0 0, rotation 0 0 0
  symmetric about XZ
  bounding box size 32.6659 6.26669 3.77397
  Design: Length=32.6659
  cross sections:
    n  XLocPercent  YLocPercent  ZLocPercent  shape
    0  0            0            0            point
    1  0.270594     0            0            rounded rectangle RoundRectXSec_Radius=1.75 RoundRect_Skew=0.0363636 RoundedRect_Height=3.77397 RoundedRect_Width=5.22104
    2  0.5          0            0            as above
    3  0.828515     0            0            as above
    4  1            0            0            rounded rectangle RoundRectXSec_Radius=0 RoundedRect_Height=0 RoundedRect_Width=4.17683

Wing "VerticalTail", child of "Fuselage"
  location (X Y Z) 30.0268 2.61052 0.5, rotation 90 0 0
  symmetric about XZ
  bounding box size 2.63909 6.6109 3.71656
  totals: TotalSpan=7.54779 TotalProjectedSpan=7.43312 TotalChord=1.71541 TotalArea=12.9475
  root: chord 2.63909, twist 0, NACA 4-series Camber=0 CamberLoc=0.2 ThickChord=0.1
  sections:
    n  Span     Root_Chord  Tip_Chord  Area     Sweep  Sweep_Location  Dihedral  Twist  Twist_Location  tip airfoil
    1  3.77389  2.63909     0.791726   6.47376  25     0               -10       0      0.25            as above

Wing "HorizontalTail", child of "VerticalTail"
  location (X Y Z) 30.6976 0 4.27389, rotation 0 0 0
  symmetric about XZ
  bounding box size 3.93661 12.7263 0.393787
  totals: TotalSpan=12.7263 TotalProjectedSpan=12.7263 TotalChord=2.5588 TotalArea=32.564
  root: chord 3.93661, twist 0, NACA 4-series Camber=0 CamberLoc=0.2 ThickChord=0.1
  sections:
    n  Span     Root_Chord  Tip_Chord  Area    Sweep  Sweep_Location  Dihedral  Twist  Twist_Location  tip airfoil
    1  6.36314  3.93661     1.18098    16.282  8      0               0         0      0.25            as above

Custom "Floor"
  location (X Y Z) 7.15868 0 -0.565024, rotation 0 0 0
  bounding box size 21.586 5.22104 0.130048
  Design: Height=0.130048 Length=21.586 SquareFlag=0 Width=5.22104
  custom script Box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

Custom "Duct"
  location (X Y Z) 30.6277 1.30526 1.60353, rotation 0 0 0
  symmetric about XZ
  bounding box size 1.27554 4.33878 1.75181
  Design: Camber=0 CamberLoc=0.2 Chord=1.27554 Height=1.52091 InvertFlag=0 Shape=0 ThickChord=0.1625 Width=1.52091
  custom script Duct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
