OpenVSP model (file version 4), 9 components.
Geometry view with OpenVSP parameter names; values to 6 digits, angles in degrees, lengths in the model's unit.
Overall bounding box: X_Min=0 X_Len=1.75594 Y_Min=-0.985903 Y_Len=1.97181 Z_Min=-0.1 Z_Len=0.321962

Fuselage "FuselageGeom"
  location (X Y Z) 0 0 0, rotation 0 0 0
  bounding box size 0.5 0.16 0.193147
  Design: Length=0.5
  cross sections:
    n  XLocPercent  YLocPercent  ZLocPercent  shape
    0  0            0            0            point
    1  0.17027      0            0            rounded rectangle RoundRectXSec_Radius=0 RoundedRect_Height=0.15 RoundedRect_Width=0.15
    2  0.5          0            0.0486486    rounded rectangle RoundRectXSec_Radius=0 RoundedRect_Height=0.187646 RoundedRect_Width=0.15
    3  0.724324     0            0.0401461    ellipse Ellipse_Height=0.18371 Ellipse_Width=0.16
    4  1            0            0            point

Stack "1U"
  location (X Y Z) 0.0543478 0 0, rotation 0 0 0
  bounding box size 0.1 0.1 0.1
  cross sections:
    n  XDelta  YDelta  ZDelta  shape
    0  0       0       0       point
    1  0       0       0       rounded rectangle RoundRectXSec_Radius=0 RoundedRect_Height=0.1 RoundedRect_Width=0.1
    2  0.1     0       0       as above
    3  0       0       0       point

Wing "WingGeom"
  location (X Y Z) 0.202206 0 0.115546, rotation 0 0 0
  symmetric about XZ
  bounding box size 0.19802 1.97181 0.0229881
  totals: TotalSpan=1.97181 TotalProjectedSpan=1.97181 TotalChord=0.171005 TotalArea=0.337189
  root: chord 0.19802, twist 0, NACA 4-series Camber=0 CamberLoc=0.2 ThickChord=0.1
  sections:
    n  Span      Root_Chord  Tip_Chord  Area      Sweep  Sweep_Location  Dihedral  Twist  Twist_Location  tip airfoil
    1  0.985903  0.19802     0.14399    0.168595  1      0               0         0      0.25            as above

Stack "boom", child of "WingGeom"
  location (X Y Z) 0.210598 0 0.115489, rotation 0 0 0
  bounding box size 1.532 0.002 0.002
  cross sections:
    n  XDelta  YDelta  ZDelta  shape
    0  0       0       0       circle Circle_Diameter=0.00175
    1  1.532   0       0       circle Circle_Diameter=0.002

Stack "PROP"
  location (X Y Z) 0.48913 0 0, rotation 0 0 0
  bounding box size 0 0.2 0.2
  cross sections:
    n  XDelta  YDelta  ZDelta  shape
    0  0       0       0       point
    1  0       0       0       circle Circle_Diameter=0.2

Wing "h"
  location (X Y Z) 1.56502 0 0.115546, rotation 0 0 0
  symmetric about XZ
  bounding box size 0.0928 0.2909 0.0107731
  totals: TotalSpan=0.2909 TotalProjectedSpan=0.2909 TotalChord=0.058 TotalArea=0.0168722
  root: chord 0.0928, twist 0, NACA 4-series Camber=0 CamberLoc=0.2 ThickChord=0.1
  sections:
    n  Span     Root_Chord  Tip_Chord  Area       Sweep  Sweep_Location  Dihedral  Twist  Twist_Location  tip airfoil
    1  0.14545  0.0928      0.0232     0.0084361  20     0               0         0      0.25            as above

Wing "v"
  location (X Y Z) 1.67553 0 0.115546, rotation 90 0 0
  symmetric about XZ
  bounding box size 0.0804102 0.00825397 0.212832
  totals: TotalSpan=0.212832 TotalProjectedSpan=0.212832 TotalChord=0.0711 TotalArea=0.0151324
  root: chord 0.0711, twist 0, NACA 4-series Camber=0 CamberLoc=0.2 ThickChord=0.1
  sections:
    n  Span      Root_Chord  Tip_Chord  Area        Sweep  Sweep_Location  Dihedral  Twist  Twist_Location  tip airfoil
    1  0.106416  0.0711      0.0711     0.00756619  5      0               0         0      0.25            as above

Stack "engine"
  location (X Y Z) 0.326087 0 0.0373641, rotation 0 0 0
  bounding box size 0.139 0.0465 0.110338
  cross sections:
    n  XDelta  YDelta  ZDelta      shape
    0  0       0       0           point
    1  0       0       0           rounded rectangle RoundRectXSec_Radius=0 RoundedRect_Height=0.1092 RoundedRect_Width=0.0465
    2  0.05    0       0           as above
    3  0       0       -0.0307377  rounded rectangle RoundRectXSec_Radius=0 RoundedRect_Height=0.05 RoundedRect_Width=0.0465
    4  0.089   0       0           circle Circle_Diameter=0.04325
    5  0       0       0           point

Stack "tank"
  location (X Y Z) 0.227582 0 0.0169837, rotation 0 0 0
  bounding box size 0.0723 0.12 0.15
  mass: Density=1 Shell_Flag=1 Mass_Area=1 Mass_Prior=0
  cross sections:
    n  XDelta  YDelta  ZDelta  shape
    0  0       0       0       point
    1  0       0       0       rounded rectangle RoundRectXSec_Radius=0 RoundedRect_Height=0.15 RoundedRect_Width=0.12
    2  0.0723  0       0       as above
    3  0       0       0       point
